<?xml version="1.0"?>
<Node name="Root" gravity="0 0 0" time="0" animate="0">
    <RequiredPlugin name="SofaDiff" pluginName="SofaDiff"/>
    <RequiredPlugin name="Sofa.Component.Mass"/> <!-- Needed to use components [UniformMass] -->
    <RequiredPlugin name="Sofa.Component.MechanicalLoad"/> <!-- Needed to use components [ConstantForceField] -->
    <RequiredPlugin name="Sofa.Component.ODESolver.Forward"/> <!-- Needed to use components [EulerExplicitSolver] -->
    <RequiredPlugin name="Sofa.Component.StateContainer"/> <!-- Needed to use components [MechanicalObject] -->
    <DefaultAnimationLoop/>
    <GradientDescentController name="controller"/>
    <Node name="parent node with independent DOFs">
        <EulerExplicitSolver name="ODE solver"/>
        <MechanicalObject template="Vec1d" name="angles"/>
        <UniformMass template="Vec1d" name="mass" totalMass="1.0"/>
        <Node name="child node with DOFs mapped from the parent">
            <MechanicalObject template="Vec3d" name="endpoint coordinates" position="1 -0.1 0"/>
            <ConstantForceField forces="1 -1 0"/>
        </Node>
    </Node>
</Node>
